# OpenSim document version 40000
AnalyzeTool Right-scaled:
  model_file: C:\Users\r03mm22\Documents\Protocol_Testing\Tests\23_12_20\OMC\das3_scaled_and_placed.osim
  replace_force_set: false
  results_directory: C:\Users\r03mm22\Documents\Protocol_Testing\Tests\23_12_20\OMC\20thDecIK_Results
  output_precision: 8
  initial_time: 18
  final_time: 40
  solve_for_equilibrium_for_auxiliary_states: false
  maximum_number_of_integrator_steps: 20000
  maximum_integrator_step_size: 1
  minimum_integrator_step_size: 1e-8
  integrator_error_tolerance: 1e-5
  coordinates_file: C:\Users\r03mm22\Documents\Protocol_Testing\Tests\23_12_20\OMC\20thDecIK_Results\OMC_IK_results.mot
  lowpass_cutoff_frequency_for_coordinates: -1
  AnalysisSet Analyses:
    StatesReporter: start_time=0 end_time=1 step_interval=1 in_degrees=true
